# Решение дифференциального уравнения методом Рунге-Кутта
zat(x, y) := 2*(x^2 + y)
methodRungeKutt(func, startVal, a, b, h) :=
    n ← (b - a)/h
    y[0] ← startVal
    for ii ∈ 0 .. n
        x[ii] ← ii*h
        kk1 ← func(x[ii], y[ii])
        kk2 ← func(x[ii] + h/2, y[ii] + h*kk1/2)
        kk3 ← func(x[ii] + h/2, y[ii] + h*kk2/2)
        kk4 ← func(x[ii] + h, y[ii] + h*kk3)
        y[ii + 1] ← y[ii] + h/6*(kk1 + 2*kk2 + 2*kk3 + kk4)
        AA[ii] ← y[ii]
    return AA[n]
methodRungeKutt(zat, 1, 0, 1, 0.1) = 8.58338
